// SBML level 3 version 2

model variable_compartment()
  // Variable compartments
  // Species in concentration in compartments whose size changes: Vc grows by a rate rule, Va follows an assignment rule of the time and of S1, the event grow doubles Ve. B is a boundary species which is diluted as Vc grows.
  // model units - substance: mole, time: second, volume: litre, extent: mole

  // Compartments:
  compartment Vc = 1 litre; Vc is "growing cell";
  compartment Va; Va has litre; Va is "assigned compartment";
  compartment Ve = 1 litre; Ve is "resized compartment";

  // Species:
  species substrate in Vc = 1;
  species intermediate in Va = 1/Va;
  species product in Ve = 1;
  species $B in Vc = 1; B is "buffer";

  // Parameters:
  k_g = 0.1 per_second; k_g is "growth rate";
  k_a = 0.2 per_second; k_a is "expansion rate";
  Va0 = 1 litre; Va0 is "initial size of Va";
  c_a = 0.1 litre_per_concentration; c_a is "swelling by the substrate";
  k1 = 1 per_second;
  k2 = 0.5 per_second;

  // Assignment rules:
  Va := Va0*(1 + k_a*time) + c_a*substrate;

  // Rate rules:
  Vc' = k_g*Vc;

  // Reactions:
  J1: substrate => intermediate; k1*substrate*Vc; J1 is "transport";
  J2: intermediate => product; k2*intermediate*Va; J2 is "conversion";

  // Events:
  grow: at (time > 2 second): Ve = 2 litre;

  // Unit definitions:
  unit per_second = 1 / second;
  unit litre_per_concentration = litre^2 / mole;
end
